OpenVSP model (file version 5), 12 components.
Geometry view with OpenVSP parameter names; values to 6 digits, angles in degrees, lengths in the model's unit.
Overall bounding box: X_Min=-2.2 X_Len=5.8 Y_Min=-1.83017 Y_Len=3.66033 Z_Min=-0.934655 Z_Len=1.86931

Blank "Masses"
  location (X Y Z) 0 0 0, rotation 0 0 0

Blank "Avionics", child of "Masses"
  location (X Y Z) -1.5 0 0, rotation 0 0 0
  mass: Density=1 Shell_Flag=0 Mass_Area=1 Mass_Prior=0 PointMass=0.3108 CGx=0 CGy=0 CGz=0 Ixx=0 Iyy=0 Izz=0 Ixy=0 Ixz=0 Iyz=0

Blank "Payload", child of "Masses"
  location (X Y Z) -0.6 0 0, rotation 0 0 0
  mass: Density=1 Shell_Flag=0 Mass_Area=1 Mass_Prior=0 PointMass=0.3108 CGx=0 CGy=0 CGz=0 Ixx=0 Iyy=0 Izz=0 Ixy=0 Ixz=0 Iyz=0

Blank "Fuel", child of "Masses"
  location (X Y Z) 0.83 0 0, rotation 0 0 0
  mass: Density=1 Shell_Flag=0 Mass_Area=1 Mass_Prior=0 PointMass=0.4227 CGx=0 CGy=0 CGz=0 Ixx=0 Iyy=0 Izz=0 Ixy=0 Ixz=0 Iyz=0

Blank "Ballast", child of "Masses"
  location (X Y Z) 2.2 0 0, rotation 0 0 0
  mass: Density=1 Shell_Flag=0 Mass_Area=1 Mass_Prior=0 PointMass=0.35 CGx=0 CGy=0 CGz=0 Ixx=0 Iyy=0 Izz=0 Ixy=0 Ixz=0 Iyz=0

Blank "Motors", child of "Masses"
  location (X Y Z) 2.6 0 0, rotation 0 0 0
  mass: Density=1 Shell_Flag=0 Mass_Area=1 Mass_Prior=0 PointMass=0.2535 CGx=0 CGy=0 CGz=0 Ixx=0 Iyy=0 Izz=0 Ixy=0 Ixz=0 Iyz=0

Wing "Wing", child of "Masses"
  location (X Y Z) 0 0 0, rotation 0 0 0
  symmetric about XZ
  bounding box size 3.1 3.66033 0.31018
  mass: Density=0.0839187 Shell_Flag=0 Mass_Area=0.0727 Mass_Prior=0
  totals: TotalSpan=3.6 TotalProjectedSpan=3.6 TotalChord=2.575 TotalArea=8.85 TotalAR=1.46441
  root: chord 3.1, twist 0, NACA 4-series Camber=0 CamberLoc=0.2 ThickChord=0.1
  sections:
    n  Span  Root_Chord  Tip_Chord  Area   Sweep  Sweep_Location  Dihedral  Twist  Twist_Location  tip airfoil
    1  0.7   3.1         3.1        2.17   0      0               0         0      0.25            as above
    2  1.1   3.1         1          2.255  0      1               0         0      0.25            as above
  SS_Control "elevon": UStart=0.53 UEnd=0.73 Length_C_Start=0.316011 Length_C_End=0.770548 Length_Start=0.9 Length_End=0.9 LE_Flag=0 Surf_Type=2

Fuselage "Body", child of "Wing"
  location (X Y Z) -1.8 0 0, rotation 0 0 0
  bounding box size 5.8 0.8 0.8
  mass: Density=0.0839187 Shell_Flag=0 Mass_Area=0.0727 Mass_Prior=0
  Design: Length=5
  cross sections:
    n  XLocPercent  YLocPercent  ZLocPercent  shape
    0  0            0            0            ellipse Ellipse_Height=0.8 Ellipse_Width=0.8
    1  1            0            0            as above

Wing "Fin", child of "Wing"
  location (X Y Z) 1.5 0 0, rotation 90 0 0.0819672
  symmetric about XY
  bounding box size 1.6 0.160093 1.86931
  mass: Density=0.0839187 Shell_Flag=0 Mass_Area=0.0727 Mass_Prior=0
  totals: TotalSpan=1.8 TotalProjectedSpan=1.8 TotalChord=1.2 TotalArea=2.16 TotalAR=1.5
  root: chord 1.6, twist 0, NACA 4-series Camber=0 CamberLoc=0.2 ThickChord=0.1
  sections:
    n  Span  Root_Chord  Tip_Chord  Area  Sweep  Sweep_Location  Dihedral  Twist  Twist_Location  tip airfoil
    1  0.9   1.6         0.8        1.08  0      1               0         0      0.25            as above

Fuselage "Inlet", child of "Wing"
  location (X Y Z) -0.1 0.6 0, rotation 0 0 0
  symmetric about XZ
  bounding box size 1.75607 1.50005 0.300047
  mass: Density=0.0839187 Shell_Flag=0 Mass_Area=0.0727 Mass_Prior=0
  Design: Length=1.5
  cross sections:
    n  XLocPercent  YLocPercent  ZLocPercent  shape
    0  0            0            0            ellipse Ellipse_Height=0.3 Ellipse_Width=0.3
    1  0            0            0            as above
    2  1            0            0            as above

Blank "cg", child of "Wing"
  location (X Y Z) 0.731 0 0, rotation 0 0 0

Blank "aero_center", child of "Wing"
  location (X Y Z) 0.93 0 0, rotation 0 0 0

VSPAERO settings: Sref=8.85 bref=3.6 cref=2.575 Xcg=0.732425 Ycg=1.11046e-06 Zcg=-1.30266e-08 AlphaStart=40 AlphaEnd=10 AlphaNpts=1 BetaStart=0 BetaEnd=0 BetaNpts=1 MachStart=0.15 MachEnd=0.9 MachNpts=1 ReCref=1e+07 Vinf=100 Rho=0.002377
  control group "elevons": DeflectionAngle=20
