OpenVSP model (file version 5), 4 components.
Geometry view with OpenVSP parameter names; values to 6 digits, angles in degrees, lengths in the model's unit.
Overall bounding box: X_Min=-10 X_Len=30 Y_Min=-32.9196 Y_Len=65.8392 Z_Min=-3.06499 Z_Len=9.06499

Wing "WingGeom"
  location (X Y Z) 0 0 0, rotation 0 0 0
  symmetric about XZ
  bounding box size 3 65.8392 2.55211
  totals: TotalSpan=66 TotalProjectedSpan=65.8392 TotalChord=2.5 TotalArea=165 TotalAR=26.2715
  root: chord 3, twist 0, NACA 4-series Camber=0 CamberLoc=0.2 ThickChord=0.1
  sections:
    n  Span  Root_Chord  Tip_Chord  Area  Sweep  Sweep_Location  Dihedral  Twist  Twist_Location  tip airfoil
    1  33    3           2          82.5  1      0               4         0      0.25            as above

Fuselage "FuselageGeom"
  location (X Y Z) -10 0 0, rotation 0 0 0
  bounding box size 30 2.70416 3
  Design: Length=30
  cross sections:
    n  XLocPercent  YLocPercent  ZLocPercent  shape
    0  0            0            0            point
    1  0.25         0            0            ellipse Ellipse_Height=3 Ellipse_Width=2.5
    2  0.5          0            0            ellipse Ellipse_Height=2 Ellipse_Width=2
    3  0.75         0            0            as above
    4  1            0            0            point

Wing "WingGeom"
  location (X Y Z) 15 0 0, rotation -30 0 0
  3 copies around X
  bounding box size 3 10.4673 9.06499
  totals: TotalSpan=12 TotalProjectedSpan=12 TotalChord=2.25 TotalArea=27 TotalAR=5.33333
  root: chord 3, twist 0, NACA 4-series Camber=0 CamberLoc=0.2 ThickChord=0.1
  sections:
    n  Span  Root_Chord  Tip_Chord  Area  Sweep  Sweep_Location  Dihedral  Twist  Twist_Location  tip airfoil
    1  6     3           1.5        13.5  10     0               0         0      0.25            as above

Mesh "MeshGeom"
  location (X Y Z) 0 0 0, rotation 0 0 0
  triangle mesh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
